<?xml version="1.0" encoding="UTF-8"?>
<neuroml xmlns="http://www.neuroml.org/schema/neuroml2"
    xmlns:xsi="http://www.w3.org/2001/XMLSchema-instance"
    xsi:schemaLocation="http://www.neuroml.org/schema/neuroml2 https://raw.github.com/NeuroML/NeuroML2/development/Schemas/NeuroML2/NeuroML_v2beta4.xsd"
    id = "L23_NoHotSpot">

  <notes> NeuroML 2 file generated from ModelView by: NEURON -- Release 7.4 (1351:8f462ea7e030) 2015-07-21
          Authors: Michael Hines, Sushil Kambampati and Padraig Gleeson,
          Yale University and UCL
  </notes>

  <cell id="L23_NoHotSpot">
    <notes>Cell: Cell0 exported from NEURON ModelView</notes>
    <morphology id="morphology">
<!-- Section: soma (segmentGroup: soma) which has 2 3D points, so 1 segment(s)-->
      <segment id="0" name = "Seg0_soma">
        <proximal x="0" y="0" z="0" diameter="29.7838"/>
        <distal x="0" y="0" z="9.26604" diameter="29.7838"/>
      </segment>
<!-- Section: dend4_1 (segmentGroup: dend4_1) which has 8 3D points, so 7 segment(s)-->
      <segment id="2452" name = "Seg0_dend4_1">
        <parent segment="0"/>
        <proximal x="0" y="0" z="13.2372" diameter="1.2801"/>
        <distal x="0.0699996" y="-2.03" z="11.3472" diameter="1.2801"/>
      </segment>
      <segment id="2453" name = "Seg1_dend4_1">
        <parent segment="2452"/>
        <distal x="-0.84" y="-3.57" z="9.9472" diameter="1.2801"/>
      </segment>
      <segment id="2454" name = "Seg2_dend4_1">
        <parent segment="2453"/>
        <distal x="-0.91" y="-5.53" z="8.7572" diameter="1.2801"/>
      </segment>
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
<!-- Section: soma (segmentGroup: soma) which has 2 3D points, so 1 segment(s)-->

      <segmentGroup id = "soma"  neuroLexId="sao864921383">
         <notes>This group contains an unbranched set of segments, and all of the segmentGroups marked with
             neuroLexId = sao864921383 form a non-overlapping set of all of the segments.
             These segmentGroups correspond to the 'cables' of NeuroML v1.8.1, and map to/from NEURON sections.</notes>
        <!-- This is currently inside (old convention) & outside (new convention) the <annotation> element, as some APIs have trouble reading what's inside <annotation> (<xs:any..> in Schema) -->
        <property tag="numberInternalDivisions" value="7"/> <!-- Discretization of model at time of export from NEURON. Can be overridden by importing application -->
        <annotation>
          <property tag="numberInternalDivisions" value="7"/> <!-- Discretization of model at time of export from NEURON. Can be overridden by importing application -->
        </annotation>
        <member segment = "0"/>
      </segmentGroup>

<!-- Section: dend4_1 (segmentGroup: dend4_1) which has 8 3D points, so 7 segment(s)-->

      <segmentGroup id = "dend4_1"  neuroLexId="sao864921383">
         <notes>This group contains an unbranched set of segments, and all of the segmentGroups marked with
             neuroLexId = sao864921383 form a non-overlapping set of all of the segments.
             These segmentGroups correspond to the 'cables' of NeuroML v1.8.1, and map to/from NEURON sections.</notes>
        <!-- This is currently inside (old convention) & outside (new convention) the <annotation> element, as some APIs have trouble reading what's inside <annotation> (<xs:any..> in Schema) -->
        <property tag="numberInternalDivisions" value="7"/> <!-- Discretization of model at time of export from NEURON. Can be overridden by importing application -->
        <annotation>
          <property tag="numberInternalDivisions" value="7"/> <!-- Discretization of model at time of export from NEURON. Can be overridden by importing application -->
        </annotation>
        <member segment = "2452"/>
        <member segment = "2453"/>
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      </segmentGroup>

<!-- Section: dend3_1 (segmentGroup: dend3_1) which has 7 3D points, so 6 segment(s)-->

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
      <segmentGroup id="dendrite_group">
        <include segmentGroup = "dend4_1"/>
        <include segmentGroup = "dend3_1"/>
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      </segmentGroup>

      <segmentGroup id="soma_group"> <!-- Creating a group containing a single section: soma... -->
        <include segmentGroup = "soma"/>
      </segmentGroup>

    </morphology>

    <!-- Biophysical properties -->

    <biophysicalProperties id="biophys">

      <membraneProperties>

        <channelDensity ionChannel="pas" id="pas_all"  condDensity = "0.000142857 S_per_cm2" ion="non_specific" erev="-75 mV" />

        <channelDensity ionChannel="kca" id="kca_all"  condDensity = "3.0e-4 S_per_cm2" ion="k" erev="-90 mV" />

        <channelDensity ionChannel="km" id="km_dends"  condDensity = "1e-4 S_per_cm2" ion="k" segmentGroup="dendrite_group"  erev="-90 mV" />

        <channelDensity ionChannel="km" id="km_soma"  condDensity = "2.2e-4 S_per_cm2" ion="k" segmentGroup="soma_group"  erev="-90 mV" />

        <channelDensity ionChannel="kv" id="kv_dends"  condDensity = "0.03 S_per_cm2" ion="k" segmentGroup="dendrite_group"  erev="-90 mV" />

        <channelDensity ionChannel="kv" id="kv_soma"  condDensity = "0.01 S_per_cm2" ion="k" segmentGroup="soma_group"  erev="-90 mV" />

        <channelDensity ionChannel="na" id="na_dends"  condDensity = "0.008 S_per_cm2" ion="na" segmentGroup="dendrite_group"  erev="60 mV" />

        <channelDensity ionChannel="na" id="na_soma"  condDensity = "0.1 S_per_cm2" ion="na" segmentGroup="soma_group"  erev="60 mV" />

        <channelDensity ionChannel="it" id="it_soma"  condDensity = "0.0003 S_per_cm2" ion="ca" segmentGroup="soma_group" erev="127.57323 mV" />

        <channelDensity ionChannel="it" id="it_dends" condDensity = "0.00015 S_per_cm2" ion="ca" segmentGroup="dendrite_group" erev="127.57323 mV" />

        <channelDensity ionChannel="ca" id="ca_all" condDensity = "5e-5 S_per_cm2" ion="ca" erev="127.57323 mV"/>

        <specificCapacitance  value="1 uF_per_cm2" />

      </membraneProperties>

      <intracellularProperties>

        <resistivity value="0.1 kohm_cm" />

      </intracellularProperties>

    </biophysicalProperties>

  </cell>

</neuroml>
