<?xml version="1.0" encoding="UTF-8"?>
<neuroml xmlns="http://www.neuroml.org/schema/neuroml2"
    xmlns:xsi="http://www.w3.org/2001/XMLSchema-instance"
    xsi:schemaLocation="http://www.neuroml.org/schema/neuroml2 https://raw.github.com/NeuroML/NeuroML2/development/Schemas/NeuroML2/NeuroML_v2beta4.xsd"
    id = "NeuroML2_file_exported_from_NEURON">

  <notes> NeuroML 2 file generated from ModelView by: NEURON -- Release 7.4 (1351:8f462ea7e030) 2015-07-21
          Authors: Michael Hines, Sushil Kambampati and Padraig Gleeson,
          Yale University and UCL
  </notes>

  <cell id="Cell0">
    <notes>Cell: Cell0 exported from NEURON ModelView</notes>
    <morphology id="morphology">
<!-- Section: soma (segmentGroup: soma) which has 2 3D points, so 1 segment(s)-->
      <segment id="0" name = "Seg0_soma">
        <proximal x="0" y="0" z="0" diameter="29.7838"/>
        <distal x="0" y="0" z="9.26604" diameter="29.7838"/>
      </segment>
<!-- Section: dend4_1 (segmentGroup: dend4_1) which has 8 3D points, so 7 segment(s)-->
      <segment id="2452" name = "Seg0_dend4_1">
        <parent segment="0"/>
        <proximal x="0" y="0" z="13.2372" diameter="1.2801"/>
        <distal x="0.0699996" y="-2.03" z="11.3472" diameter="1.2801"/>
      </segment>
      <segment id="2453" name = "Seg1_dend4_1">
        <parent segment="2452"/>
        <distal x="-0.84" y="-3.57" z="9.9472" diameter="1.2801"/>
      </segment>
      <segment id="2454" name = "Seg2_dend4_1">
        <parent segment="2453"/>
        <distal x="-0.91" y="-5.53" z="8.7572" diameter="1.2801"/>
      </segment>
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
<!-- Section: soma (segmentGroup: soma) which has 2 3D points, so 1 segment(s)-->

      <segmentGroup id = "soma"  neuroLexId="sao864921383">
         <notes>This group contains an unbranched set of segments, and all of the segmentGroups marked with
             neuroLexId = sao864921383 form a non-overlapping set of all of the segments.
             These segmentGroups correspond to the 'cables' of NeuroML v1.8.1, and map to/from NEURON sections.</notes>
        <!-- This is currently inside (old convention) & outside (new convention) the <annotation> element, as some APIs have trouble reading what's inside <annotation> (<xs:any..> in Schema) -->
        <property tag="numberInternalDivisions" value="7"/> <!-- Discretization of model at time of export from NEURON. Can be overridden by importing application -->

        <member segment = "0"/>
      </segmentGroup>

<!-- Section: dend4_1 (segmentGroup: dend4_1) which has 8 3D points, so 7 segment(s)-->

      <segmentGroup id = "dend4_1"  neuroLexId="sao864921383">
         <notes>This group contains an unbranched set of segments, and all of the segmentGroups marked with
             neuroLexId = sao864921383 form a non-overlapping set of all of the segments.
             These segmentGroups correspond to the 'cables' of NeuroML v1.8.1, and map to/from NEURON sections.</notes>
        <!-- This is currently inside (old convention) & outside (new convention) the <annotation> element, as some APIs have trouble reading what's inside <annotation> (<xs:any..> in Schema) -->
        <property tag="numberInternalDivisions" value="7"/> <!-- Discretization of model at time of export from NEURON. Can be overridden by importing application -->

        <member segment = "2452"/>
        <member segment = "2453"/>
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      </segmentGroup>

<!-- Section: dend3_1 (segmentGroup: dend3_1) which has 7 3D points, so 6 segment(s)-->

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
    </morphology>

  </cell>

  <network id="network" type="networkWithTemperature" temperature="6 degC">
    <population id="Pop_Cell0" component="Cell0" size="1" type="populationList">
        <instance id="0">
            <location x="0" y="0" z="0"/>
        </instance>
    </population>
  </network>

</neuroml>
