<Lems>

    <!--

        This LEMS file has been automatically generated using PyNeuroML v0.2.10 (libNeuroML v0.2.29)

     -->

    <!-- Specify which component to run -->
    <Target component="Sim_L23_One"/>

    <!-- Include core NeuroML2 ComponentType definitions -->
    <Include file="Cells.xml"/>
    <Include file="Networks.xml"/>
    <Include file="Simulation.xml"/>

    <Include file="L23_NoHotSpot.cell.nml"/>
    <Include file="ca.channel.nml"/>
    <Include file="it.channel.nml"/>
    <Include file="kca.channel.nml"/>
    <Include file="km.channel.nml"/>
    <Include file="kv.channel.nml"/>
    <Include file="na.channel.nml"/>
    <Include file="pas.channel.nml"/>
    <Include file="L23_One.net.nml"/>

    <Simulation id="Sim_L23_One" length="400ms" step="0.025ms" target="L23_One" seed="12345">  <!-- Note seed: ensures same random numbers used every run -->

        <Display id="DispPop__L23_pop" title="Membrane potentials of cells in L23_pop" timeScale="1ms" xmin="-40.0" xmax="440.0" ymin="-90" ymax="50">
            <Line id="L23_pop[0]: v" quantity="L23_pop/0/L23_NoHotSpot/v" scale="1mV" color="#6aa799" timeScale="1ms"/>
        </Display>

        <OutputFile id="Volts_file__L23_pop" fileName="Sim_L23_One.L23_pop.v.dat">
            <OutputColumn id="v_L23_pop_0_L23_NoHotSpot_v" quantity="L23_pop/0/L23_NoHotSpot/v"/>
        </OutputFile>

    </Simulation>

</Lems>
